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a := 82
l1 := 54
r2 := 178
r0 := 0
r3 := 178
l3 := 54
l2 := 178
z0 := 190
x1 := 0
y1 := 250
z1 := 250
α := atan(x/y)
r := sqrt(x^2 + y^2)
rt := r - r0 - a
zt := z - z0
zr := sqrt(rt^2 + zt^2)
β := π/2 - (acos((r2^2 + zr^2 - r3^2)/(2*r2*zr)) + atan(zt/rt))
γ0 := acos((r3^2 + r2^2 - zr^2)/(2*r3*r2)) - β
θ := π - (β + γ0)
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l := sqrt(r2^2 + l1^2 - 2*r2*l1*cos(θ))
ε1 := acos((l2^2 + l^2 - l3^2)/(2*l2*l))
λ := acos((l2^2 + l3^2 - l^2)/(2*l2*l3))
ε2 := acos((l1^2 + l^2 - r2^2)/(2*l1*l))
γ2 := ε1 + ε2 - γ0
δ := π - (λ + γ2)
α0 := 180*α/π
β0 := 180*β/π
δ0 := 180*δ/π
α3 := α0
β3 := β0
δ3 := 90 - δ0
